// SBML level 3 version 2

model biocrnpyler_122872()
  // model units - substance: mole, time: second, volume: litre, area: square_metre, length: metre, extent: mole

  // Compartments:
  compartment default = 1e-6;

  // Species:
  species protein_CFP_degtagged in default = 0;
  species rna_input_gate_0 in default = 0;
  species rna_input_gate_1 in default = 0;
  species rna_output_rna in default = 0;
  species dna_ugate_0 in default = 0;
  species rna_ugate_0 in default = 0;
  species dna_ugate_1 in default = 0;
  species rna_ugate_1 in default = 0;
  species dna_input in default = 0;
  species rna_input_rna in default = 0;
  species protein_ribozyme_0 in default = 0;
  species rna_gate_0 in default = 0;
  species protein_ribozyme_1 in default = 0;
  species rna_gate_1 in default = 0;

  // Parameters:
  ktx__ = 0.013;
  kcat__ = 0.004166667;
  kdil__ = 0.00075;
  kdil_rna_input_gate_1_ = 0.000375;
  kdil_rna_gate_0_ = 0.000375;
  kdil_rna_input_gate_0_ = 0.000375;
  kdil_rna_ugate_1_ = 0.000375;
  kdil_rna_gate_1_ = 0.000375;
  kdil_rna_ugate_0_ = 0.000375;

  // Reactions:
  r0: dna_ugate_0 => dna_ugate_0 + rna_ugate_0; ktx__*dna_ugate_0;
  r1: dna_ugate_1 => dna_ugate_1 + rna_ugate_1; ktx__*dna_ugate_1;
  r2: dna_input => dna_input + rna_input_rna; ktx__*dna_input;
  r3: protein_ribozyme_0 + rna_ugate_0 => protein_ribozyme_0 + rna_gate_0; kcat__*protein_ribozyme_0*rna_ugate_0;
  r4: protein_ribozyme_1 + rna_ugate_1 => protein_ribozyme_1 + rna_gate_1; kcat__*protein_ribozyme_1*rna_ugate_1;
  r5: protein_CFP_degtagged => ; kdil__*protein_CFP_degtagged;
  r6: rna_input_gate_1 => ; kdil_rna_input_gate_1_*rna_input_gate_1;
  r7: rna_gate_0 => ; kdil_rna_gate_0_*rna_gate_0;
  r8: rna_input_gate_0 => ; kdil_rna_input_gate_0_*rna_input_gate_0;
  r9: rna_ugate_1 => ; kdil_rna_ugate_1_*rna_ugate_1;
  r10: rna_gate_1 => ; kdil_rna_gate_1_*rna_gate_1;
  r11: rna_output_rna => ; kdil__*rna_output_rna;
  r12: rna_ugate_0 => ; kdil_rna_ugate_0_*rna_ugate_0;
  r13: rna_input_rna => ; kdil__*rna_input_rna;
  r14: rna_input_rna + rna_gate_0 => rna_input_gate_0 + rna_output_rna; r14_k_forward*rna_input_rna*rna_gate_0;
    r14_k_forward = 1e-6;
  r14rev: rna_input_gate_0 + rna_output_rna => rna_input_rna + rna_gate_0; r14rev_k_reverse*rna_input_gate_0*rna_output_rna;
    r14rev_k_reverse = 2.7e-7;
  r15: rna_input_gate_0 => protein_CFP_degtagged + rna_input_gate_0; r15_k_forward*rna_input_gate_0;
    r15_k_forward = 0.025;
  r16: rna_input_rna + rna_gate_1 => rna_input_gate_1 + rna_output_rna; r16_k_forward*rna_input_rna*rna_gate_1;
    r16_k_forward = 1e-6;
  r16rev: rna_input_gate_1 + rna_output_rna => rna_input_rna + rna_gate_1; r16rev_k_reverse*rna_input_gate_1*rna_output_rna;
    r16rev_k_reverse = 2.7e-7;
  r17: rna_input_gate_1 => protein_CFP_degtagged + rna_input_gate_1; r17_k_forward*rna_input_gate_1;
    r17_k_forward = 0.0125;

  // Unit definitions:
  unit square_metre = metre^2;
end
