// SBML level 3 version 2

model biocrnpyler_253488()
  // model units - substance: mole, time: second, volume: litre, area: square_metre, length: metre, extent: mole

  // Compartments:
  compartment default = 1e-6;

  // Species:
  species protein_CFP_degtagged in default = 0;
  species rna_input_gate_0 in default = 0;
  species rna_output_rna in default = 0;
  species dna_ugate_0 in default = 0;
  species rna_ugate_0 in default = 0;
  species dna_input in default = 0;
  species rna_input_rna in default = 0;
  species protein_ribozyme_0 in default = 0;
  species rna_gate_0 in default = 0;

  // Parameters:
  ktx__ = 0.013;
  kcat__ = 0.004166667;
  kdil__ = 0.00075;
  kdil_rna_gate_0_ = 0.000375;
  kdil_rna_input_gate_0_ = 0.000375;
  kdil_rna_ugate_0_ = 0.000375;

  // Reactions:
  r0: dna_ugate_0 => dna_ugate_0 + rna_ugate_0; ktx__*dna_ugate_0;
  r1: dna_input => dna_input + rna_input_rna; ktx__*dna_input;
  r2: protein_ribozyme_0 + rna_ugate_0 => protein_ribozyme_0 + rna_gate_0; kcat__*protein_ribozyme_0*rna_ugate_0;
  r3: protein_CFP_degtagged => ; kdil__*protein_CFP_degtagged;
  r4: rna_gate_0 => ; kdil_rna_gate_0_*rna_gate_0;
  r5: rna_input_gate_0 => ; kdil_rna_input_gate_0_*rna_input_gate_0;
  r6: rna_output_rna => ; kdil__*rna_output_rna;
  r7: rna_ugate_0 => ; kdil_rna_ugate_0_*rna_ugate_0;
  r8: rna_input_rna => ; kdil__*rna_input_rna;
  r9: rna_input_rna + rna_gate_0 => rna_input_gate_0 + rna_output_rna; r9_k_forward*rna_input_rna*rna_gate_0;
    r9_k_forward = 1e-6;
  r9rev: rna_input_gate_0 + rna_output_rna => rna_input_rna + rna_gate_0; k_reverse*rna_input_gate_0*rna_output_rna;
    k_reverse = 2.7e-7;
  r10: rna_input_gate_0 => protein_CFP_degtagged + rna_input_gate_0; r10_k_forward*rna_input_gate_0;
    r10_k_forward = 0.025;

  // Unit definitions:
  unit square_metre = metre^2;
end
