// SBML level 3 version 2

model biocrnpyler_736013()
  // model units - substance: mole, time: second, volume: litre, area: square_metre, length: metre, extent: mole

  // Compartments:
  compartment default = 1e-6;

  // Species:
  species protein_CFP_degtagged in default = 0;
  species rna_input_gate in default = 0;
  species rna_output_rna in default = 0;
  species dna_ugate in default = 0;
  species rna_ugate in default = 0;
  species dna_input in default = 0;
  species rna_input_rna in default = 0;
  species protein_ribozyme in default = 0;
  species rna_gate in default = 0;

  // Parameters:
  ktx__ = 0.013;
  kcat__ = 0.004166667;
  kdil__ = 0.00075;
  kdil_rna_ugate_ = 0.000375;
  kdil_rna_input_gate_ = 0.000375;
  kdil_rna_gate_ = 0.000375;

  // Reactions:
  r0: dna_ugate => dna_ugate + rna_ugate; ktx__*dna_ugate;
  r1: dna_input => dna_input + rna_input_rna; ktx__*dna_input;
  r2: protein_ribozyme + rna_ugate => protein_ribozyme + rna_gate; kcat__*protein_ribozyme*rna_ugate;
  r3: protein_CFP_degtagged => ; kdil__*protein_CFP_degtagged;
  r4: rna_ugate => ; kdil_rna_ugate_*rna_ugate;
  r5: rna_input_gate => ; kdil_rna_input_gate_*rna_input_gate;
  r6: rna_input_rna => ; kdil__*rna_input_rna;
  r7: rna_output_rna => ; kdil__*rna_output_rna;
  r8: rna_gate => ; kdil_rna_gate_*rna_gate;
  r9: rna_input_rna + rna_gate => rna_input_gate + rna_output_rna; r9_k_forward*rna_input_rna*rna_gate;
    r9_k_forward = 1e-6;
  r9rev: rna_input_gate + rna_output_rna => rna_input_rna + rna_gate; k_reverse*rna_input_gate*rna_output_rna;
    k_reverse = 2.7e-7;
  r10: rna_input_gate => protein_CFP_degtagged + rna_input_gate; r10_k_forward*rna_input_gate;
    r10_k_forward = 0.0005;

  // Unit definitions:
  unit square_metre = metre^2;
end
